// COMSOL Multiphysics 6.3.0.290 model "com40 AlGaAs SiO2.mph"
// Outline of the model tree

Parameters
  wcor = 600[nm]  // Width core
  hcor = 400[nm]  // Height core
  wcla = wbound  // Width clad side
  hcla = hbound/2  // Height clad
  wbas = wbound  // Width base
  hbas = hbound/2  // Height base
  hbound = 3000[nm]  // Height boundary
  wbound = 3000[nm]  // Width boundary
  frp = c_const/wlp  // Time frequency pump
  omp = 2*pi*frp  // Angular frequency pump
  c = c_const  // Light speed
  nclad = 1.44  // Refractive index clad
  wlp = 1550[nm]  // Wavelength o the pump
  ncor = 3.28  // Ref ind core

Variables
  var1 "Variables 1"

Geometry
  geom1 "Geometry 1" (2D, length unit nm)
    r1: Rectangle "Core" | size = {wcor, hcor}; pos = {(wbound/2)-(wcor/2), (hbound/2)}
    r2: Rectangle "Clad Side" | size = {wcla, hcla+200[nm]}; pos = {0, hbas}
    r3: Rectangle "Base" | size = {wbas, hbas}
    r4: Rectangle | size = {wcor+1000, hcor+1000}; pos = {(wbound/2)-((wcor+1000)/2), (hbound/2)-((hcor+1000-500)/2)}
    fin: Finalize "Form Union"

Materials
  mat5: Common "SiO2 - Silicon oxide" (disabled) on domains 1-4
    def: def "Basic"
      electricconductivity = 0[S/m]
      thermalexpansioncoefficient = 0.5e-6[1/K]
      heatcapacity = 730[J/(kg*K)]
      relpermittivity = 4.2
      density = 2200[kg/m^3]
      thermalconductivity = 1.4[W/(m*K)]
    Enu: Enu "Young's modulus and Poisson's ratio"
      E = 70e9[Pa]
      nu = 0.17
  mat11: Common "SiO2 manual" (disabled) on domains 1-4
    RefractiveIndex: RefractiveIndex
      n = 1.45
      ki = 0
  mat15: Common "SiO2 (Silicon dioxide, Silica, Quartz) (Malitson 1965: Fused silica; n 0.21-6.7 um)" (disabled) on domains 1, 3
    DispersionModelSellmeierStandard: DispersionModelSellmeierStandard "Sellmeier"
      ODsma = {0.6961663, 0.4079426, 0.8974794, 0.00467914825849, 0.013512063074, 97.9340025379}
      Trefsma = 22[degC]
      Prefsma = 0
    RefractiveIndex: RefractiveIndex
      ki = 0
  mat16: Common "GaP (Gallium phosphide) (Bond 1965: n 0.5-4.0 um)" (disabled) on domains 5
    RefractiveIndex: RefractiveIndex
      n = nr(c_const/freq)
      ki = 0
      int1: Interpolation
        funcnametable = {int1, 1}
        funcname = nr
        table = 
          {0.5, 3.4595}
          {0.6, 3.3495}
          {0.7, 3.2442}
          {0.8, 3.183}
          {0.9, 3.143}
          {1.0, 3.1192}
          {1.1, 3.0981}
          {1.2, 3.0844}
          {1.4, 3.0646}
          {1.6, 3.0509}
          {1.8, 3.0439}
          {2.0, 3.0379}
          {2.2, 3.0331}
          {2.4, 3.0296}
          {2.6, 3.0271}
          {2.8, 3.0236}
          {3.0, 3.0215}
          {3.2, 3.0197}
          {3.4, 3.0181}
          {3.6, 3.0166}
          {3.8, 3.0159}
          {4.0, 3.0137}
        fununit = 1
        argunit = um
  mat17: Common "Fused Silica (SiO2) - Caique" (disabled) on domains 1, 3
    // SiO2 data
    def: def "Basic"
      density = 2203[kg/m^3]
      relpermeability = 1
      relpermittivity = n_sel_SiO2(wlp)^2
      electricconductivity = 0
      P11 = 0.121
      DESCR_PREFIX:P11 = (measured) p11, photo-elastic tensor component
      P12 = 0.271
      DESCR_PREFIX:P12 = (measured) p12, photo-elastic tensor component
      P13 = P12
      DESCR_PREFIX:P13 = p13, photo-elastic tensor component
      P14 = 0
      DESCR_PREFIX:P14 = p14, photo-elastic tensor component
      P15 = 0
      DESCR_PREFIX:P15 = p15, photo-elastic tensor component
      P16 = 0
      DESCR_PREFIX:P16 = p16, photo-elastic tensor component
      P21 = P12
      DESCR_PREFIX:P21 = p21, photo-elastic tensor component
      P22 = P11
      DESCR_PREFIX:P22 = p22, photo-elastic tensor component
      P23 = P12
      DESCR_PREFIX:P23 = p23, photo-elastic tensor component
      P24 = 0
      DESCR_PREFIX:P24 = p24, photo-elastic tensor component
      P25 = 0
      DESCR_PREFIX:P25 = p25, photo-elastic tensor component
      P26 = 0
      DESCR_PREFIX:P26 = p26, photo-elastic tensor component
      P31 = P12
      DESCR_PREFIX:P31 = p31, photo-elastic tensor component
      P32 = P12
      DESCR_PREFIX:P32 = p32, photo-elastic tensor component
      P33 = P11
      DESCR_PREFIX:P33 = p33, photo-elastic tensor component
      P34 = 0
      DESCR_PREFIX:P34 = p34, photo-elastic tensor component
      P35 = 0
      DESCR_PREFIX:P35 = p35, photo-elastic tensor component
      P36 = 0
      DESCR_PREFIX:P36 = p36, photo-elastic tensor component
      P41 = 0
      DESCR_PREFIX:P41 = p41, photo-elastic tensor component
      P42 = 0
      DESCR_PREFIX:P42 = p42, photo-elastic tensor component
      P43 = 0
      DESCR_PREFIX:P43 = p43, photo-elastic tensor component
      P44 = 0.5*(P11 - P12)
      DESCR_PREFIX:P44 = p44, photo-elastic tensor component
      P45 = 0
      DESCR_PREFIX:P45 = p45, photo-elastic tensor component
      P46 = 0
      DESCR_PREFIX:P46 = p46, photo-elastic tensor component
      P51 = 0
      DESCR_PREFIX:P51 = p51, photo-elastic tensor component
      P52 = 0
      DESCR_PREFIX:P52 = p52, photo-elastic tensor component
      P53 = 0
      DESCR_PREFIX:P53 = p53, photo-elastic tensor component
      P54 = 0
      DESCR_PREFIX:P54 = p54, photo-elastic tensor component
      P55 = 0.5*(P11 - P12)
      DESCR_PREFIX:P55 = p55, photo-elastic tensor component
      P56 = 0
      DESCR_PREFIX:P56 = p56, photo-elastic tensor component
      P61 = 0
      DESCR_PREFIX:P61 = p61, photo-elastic tensor component
      P62 = 0
      DESCR_PREFIX:P62 = p62, photo-elastic tensor component
      P63 = 0
      DESCR_PREFIX:P63 = p63, photo-elastic tensor component
      P64 = 0
      DESCR_PREFIX:P64 = p64, photo-elastic tensor component
      P65 = 0
      DESCR_PREFIX:P65 = p65, photo-elastic tensor component
      P66 = 0.5*(P11 - P12)
      DESCR_PREFIX:P66 = p66, photo-elastic tensor component
      an1: Analytic "n_sel_SiO2"
        // Berge Tatian, "Fitting refractive-index data with the Sellmeier dispersion formula," Appl. Opt. 23, 4477-4485 (1984)
        funcname = n_sel_SiO2
        expr = (1 + ((wlp^(2))*0.6961663e12)/((wlp^(2))*1e12 - 0.00467914825849) + ((wlp^(2))*0.4079426e12)/((wlp^(2))*1e12 - 0.013512063074) + ((wlp^(2))*0.8974794e12)/((wlp^(2))*1e12 - 97.934002537921))^(1./2.)
        args = wlp
        argunit = m
    Anisotropic: Anisotropic
      D = {C11, C12, C13, C16, C14, C15, C12, C22, C23, C26, C24, C25, C13, C23, C33, C36, C34, C35, C16, C26, C36, C66, C64, C65, C14, C24, C34, C64, C44, C45, C15, C25, C35, C65, C45, C55}
      eta_D = {0, 0, 0, 0, 0, 0, 0, 0, 0, 0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}
      C11 = 78.5[GPa]
      DESCR_PREFIX:C11 = (measured) c11, elastic stiffnesses component
      C12 = 16.1[GPa]
      DESCR_PREFIX:C12 = (measured) c12, elastic stiffnesses component
      C13 = C12
      DESCR_PREFIX:C13 = c13, elastic stiffnesses component
      C14 = 0[Pa]
      DESCR_PREFIX:C14 = c14, elastic stiffnesses component
      C15 = 0[Pa]
      DESCR_PREFIX:C15 = c15, elastic stiffnesses component
      C16 = 0[Pa]
      DESCR_PREFIX:C16 = c16, elastic stiffnesses component
      C21 = C12
      DESCR_PREFIX:C21 = c21, elastic stiffnesses component
      C22 = C11
      DESCR_PREFIX:C22 = c22, elastic stiffnesses component
      C23 = C12
      DESCR_PREFIX:C23 = c23, elastic stiffnesses component
      C24 = 0[Pa]
      DESCR_PREFIX:C24 = c24, elastic stiffnesses component
      C25 = 0[Pa]
      DESCR_PREFIX:C25 = c25, elastic stiffnesses component
      C26 = 0[Pa]
      DESCR_PREFIX:C26 = c26, elastic stiffnesses component
      C31 = C12
      DESCR_PREFIX:C31 = c31, elastic stiffnesses component
      C32 = C12
      DESCR_PREFIX:C32 = c32, elastic stiffnesses component
      C33 = C11
      DESCR_PREFIX:C33 = c33, elastic stiffnesses component
      C34 = 0[Pa]
      DESCR_PREFIX:C34 = c34, elastic stiffnesses component
      C35 = 0[Pa]
      DESCR_PREFIX:C35 = c35, elastic stiffnesses component
      C36 = 0[Pa]
      DESCR_PREFIX:C36 = c36, elastic stiffnesses component
      C41 = 0[Pa]
      DESCR_PREFIX:C41 = c41, elastic stiffnesses component
      C42 = 0[Pa]
      DESCR_PREFIX:C42 = c42, elastic stiffnesses component
      C43 = 0[Pa]
      DESCR_PREFIX:C43 = c43, elastic stiffnesses component
      C44 = 0.5*(C11-C12)
      DESCR_PREFIX:C44 = c44, elastic stiffnesses component
      C45 = 0[Pa]
      DESCR_PREFIX:C45 = c45, elastic stiffnesses component
      C46 = 0[Pa]
      DESCR_PREFIX:C46 = c46, elastic stiffnesses component
      C51 = 0[Pa]
      DESCR_PREFIX:C51 = c51, elastic stiffnesses component
      C52 = 0[Pa]
      DESCR_PREFIX:C52 = c52, elastic stiffnesses component
      C53 = 0[Pa]
      DESCR_PREFIX:C53 = c53, elastic stiffnesses component
      C54 = 0[Pa]
      DESCR_PREFIX:C54 = c54, elastic stiffnesses component
      C55 = 0.5*(C11-C12)
      DESCR_PREFIX:C55 = c55, elastic stiffnesses component
      C56 = 0[Pa]
      DESCR_PREFIX:C56 = c56, elastic stiffnesses component
      C61 = 0[Pa]
      DESCR_PREFIX:C61 = c61, elastic stiffnesses component
      C62 = 0[Pa]
      DESCR_PREFIX:C62 = c62, elastic stiffnesses component
      C63 = 0[Pa]
      DESCR_PREFIX:C63 = c63, elastic stiffnesses component
      C64 = 0[Pa]
      DESCR_PREFIX:C64 = c64, elastic stiffnesses component
      C65 = 0[Pa]
      DESCR_PREFIX:C65 = c65, elastic stiffnesses component
      C66 = 0.5*(C11-C12)
      DESCR_PREFIX:C66 = c66, elastic stiffnesses component
      Eta11 = 1.6e-3[Pa*s]
      DESCR_PREFIX:Eta11 = (measured) eta11, linear viscosity component
      Eta12 = 1.29e-3[Pa*s]
      DESCR_PREFIX:Eta12 = (measured) eta12, linear viscosity component
      Eta13 = Eta12
      DESCR_PREFIX:Eta13 = eta13, linear viscosity component
      Eta14 = 0[Pa*s]
      DESCR_PREFIX:Eta14 = eta14, linear viscosity component
      Eta15 = 0[Pa*s]
      DESCR_PREFIX:Eta15 = eta15, linear viscosity component
      Eta16 = 0[Pa*s]
      DESCR_PREFIX:Eta16 = eta16, linear viscosity component
      Eta21 = Eta12
      DESCR_PREFIX:Eta21 = eta21, linear viscosity component
      Eta22 = Eta11
      DESCR_PREFIX:Eta22 = eta22, linear viscosity component
      Eta23 = Eta12
      DESCR_PREFIX:Eta23 = eta23, linear viscosity component
      Eta24 = 0[Pa*s]
      DESCR_PREFIX:Eta24 = eta24, linear viscosity component
      Eta25 = 0[Pa*s]
      DESCR_PREFIX:Eta25 = eta25, linear viscosity component
      Eta26 = 0[Pa*s]
      DESCR_PREFIX:Eta26 = eta26, linear viscosity component
      Eta31 = Eta12
      DESCR_PREFIX:Eta31 = eta31, linear viscosity component
      Eta32 = Eta12
      DESCR_PREFIX:Eta32 = eta32, linear viscosity component
      Eta33 = Eta11
      DESCR_PREFIX:Eta33 = eta33, linear viscosity component
      Eta34 = 0[Pa*s]
      DESCR_PREFIX:Eta34 = eta34, linear viscosity component
      Eta35 = 0[Pa*s]
      DESCR_PREFIX:Eta35 = eta35, linear viscosity component
      Eta36 = 0[Pa*s]
      DESCR_PREFIX:Eta36 = eta36, linear viscosity component
      Eta41 = 0[Pa*s]
      DESCR_PREFIX:Eta41 = eta41, linear viscosity component
      Eta42 = 0[Pa*s]
      DESCR_PREFIX:Eta42 = eta42, linear viscosity component
      Eta43 = 0[Pa*s]
      DESCR_PREFIX:Eta43 = eta43, linear viscosity component
      Eta44 = 0.5*(Eta11-Eta12)
      DESCR_PREFIX:Eta44 = eta44, linear viscosity component
      Eta45 = 0[Pa*s]
      DESCR_PREFIX:Eta45 = eta45, linear viscosity component
      Eta46 = 0[Pa*s]
      DESCR_PREFIX:Eta46 = eta46, linear viscosity component
      Eta51 = 0[Pa*s]
      DESCR_PREFIX:Eta51 = eta51, linear viscosity component
      Eta52 = 0[Pa*s]
      DESCR_PREFIX:Eta52 = eta52, linear viscosity component
      Eta53 = 0[Pa*s]
      DESCR_PREFIX:Eta53 = eta53, linear viscosity component
      Eta54 = 0[Pa*s]
      DESCR_PREFIX:Eta54 = eta54, linear viscosity component
      Eta55 = 0.5*(Eta11-Eta12)
      DESCR_PREFIX:Eta55 = eta55, linear viscosity component
      Eta56 = 0[Pa*s]
      DESCR_PREFIX:Eta56 = eta56, linear viscosity component
      Eta61 = 0[Pa*s]
      DESCR_PREFIX:Eta61 = eta61, linear viscosity component
      Eta62 = 0[Pa*s]
      DESCR_PREFIX:Eta62 = eta62, linear viscosity component
      Eta63 = 0[Pa*s]
      DESCR_PREFIX:Eta63 = eta63, linear viscosity component
      Eta64 = 0[Pa*s]
      DESCR_PREFIX:Eta64 = eta64, linear viscosity component
      Eta65 = 0[Pa*s]
      DESCR_PREFIX:Eta65 = eta65, linear viscosity component
      Eta66 = 0.5*(Eta11-Eta12)
      DESCR_PREFIX:Eta66 = eta66, linear viscosity component
  mat18: Common "GaP man sel" (disabled) on domains 5
    def: def "Basic"
      relpermittivity = n_sel_GaP(wlp)^2
      an1: Analytic "n_sel_GaP" | funcname = n_sel_GaP; expr = (1+(((wlp^2)*1.39)/((wlp^2)-0.172^2))+(((wlp^2)*4.131)/((wlp^2)-0.234^2))+(((wlp^2)*2.57)/((wlp^2)-0.345^2))+(((wlp^2)*2.056)/((wlp^2)-27.5^2)))^(1/2); args = wlp; argunit = um
  mat13: Common "Air" (disabled) on domains 2, 4
    def: def "Basic"
      thermalexpansioncoefficient = alpha_p(pA,T)
      molarmass = 0.02897[kg/mol]
      bulkviscosity = muB(T)
      relpermeability = 1
      relpermittivity = 1
      dynamicviscosity = eta(T)
      ratioofspecificheat = 1.4
      electricconductivity = 0[S/m]
      heatcapacity = Cp(T)
      density = rho(pA,T)
      thermalconductivity = k(T)
      soundspeed = cs(T)
      eta: Piecewise | arg = T; pieces = {200.0, 1600.0, -8.38278E-7+8.35717342E-8*T^1-7.69429583E-11*T^2+4.6437266E-14*T^3-1.06585607E-17*T^4}; argunit = K; fununit = Pa*s
      Cp: Piecewise | arg = T; pieces = {200.0, 1600.0, 1047.63657-0.372589265*T^1+9.45304214E-4*T^2-6.02409443E-7*T^3+1.2858961E-10*T^4}; argunit = K; fununit = J/(kg*K)
      rho: Analytic | expr = pA*0.02897/R_const[K*mol/J]/T; args = {pA, T}; fununit = kg/m^3; argunit = {Pa, K}
      k: Piecewise | arg = T; pieces = {200.0, 1600.0, -0.00227583562+1.15480022E-4*T^1-7.90252856E-8*T^2+4.11702505E-11*T^3-7.43864331E-15*T^4}; argunit = K; fununit = W/(m*K)
      cs: Analytic | expr = sqrt(1.4*R_const[K*mol/J]/0.02897*T); args = T; fununit = m/s; argunit = K
      an1: Analytic | funcname = alpha_p; expr = -1/rho(pA,T)*d(rho(pA,T),T); args = {pA, T}; fununit = 1/K; argunit = {Pa, K}
      an2: Analytic "Analytic 2a" | funcname = muB; expr = 0.6*eta(T); args = T; fununit = Pa*s; argunit = K
    RefractiveIndex: RefractiveIndex
      n = 1
      ki = 0
    NonlinearModel: NonlinearModel
      BA = def.gamma-1
    idealGas: idealGas
      Rs = R_const/Mn
      heatcapacity = Cp(T)
      ratioofspecificheat = 1.4
      molarmass = 0.02897[kg/mol]
      Cp: Piecewise | arg = T; pieces = {200.0, 1600.0, 1047.63657-0.372589265*T^1+9.45304214E-4*T^2-6.02409443E-7*T^3+1.2858961E-10*T^4}; argunit = K; fununit = J/(kg*K)
  mat19: Common "SiO2 man sel" on domains 1-4
    def: def "Basic"
      relpermittivity = n_sel_SiO2(wlp)^2
      an1: Analytic "n_sel_SiO2" | funcname = n_sel_SiO2; expr = (1 + ((wlp^2 * 0.6961663) / (wlp^2 - 0.0684043^2)) + ((wlp^2 * 0.4079426) / (wlp^2 - 0.1162414^2)) + ((wlp^2 * 0.8974794) / (wlp^2 - 9.896161^2)))^(1/2); args = wlp; argunit = um
  mat20: Common "Al0.219Ga0.791As anl" (disabled) on domains 5
    def: def "Basic"
      relpermittivity = n_anl_AlGaAs(wlp)^2
      int1: Interpolation "n_anl_Al0219Ga0791As"
        funcnametable = {int1, 1}
        funcname = n_anl_AlGaAs
        table = 
          {0.26049, 3.40984E+00}
          {0.26159, 3.49239E+00}
          {0.26270, 3.56937E+00}
          {0.26381, 3.64125E+00}
          {0.26494, 3.70563E+00}
          {0.26608, 3.76631E+00}
          {0.26723, 3.82429E+00}
          {0.26838, 3.87787E+00}
          {0.26955, 3.92368E+00}
          {0.27073, 3.96238E+00}
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        fununit = 1
        argunit = um
      int2: Interpolation "k_anl_Al0219Ga0791As" (disabled)
        funcnametable = {int2, 1}
        funcname = k_anl_Al0219Ga0791As
        table = 
          {0.26049, 3.75916E+00}
          {0.26159, 3.69956E+00}
          {0.26270, 3.63592E+00}
          {0.26381, 3.56879E+00}
          {0.26494, 3.50007E+00}
          {0.26608, 3.42872E+00}
          {0.26723, 3.35410E+00}
          {0.26838, 3.27574E+00}
          {0.26955, 3.19312E+00}
          {0.27073, 3.10748E+00}
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        fununit = 1
        argunit = 1
  mat21: Common "Al0.2Ga0.8As" on domains 5
    def: def "Basic"
      relpermittivity = n_sel_Al02Ga08As(wlp)^2
      an1: Analytic "n_sel_Al02Ga08As" | funcname = n_sel_Al02Ga08As; expr = (10.322 + 0.97501 / (wlp^2 - 0.0792) - 0.00405 * wlp^2)^(0.5); args = wlp; argunit = um

Physics
  ewfd: ElectromagneticWavesFrequencyDomain on all domains
    dependent variable E = {Ex, Ey, Ez}
    MeshControl.SizeControlParameter = UserDefined
    MeshControl.PhysicsControlledMeshMaximumElementSize = 0.1*wlp
    wee1: WaveEquationElectric (default) | DisplacementFieldModel = RefractiveIndex; n_mat = from_mat
    pec1: PerfectElectricConductor (default)
    init1: init "Initial Values 1" (default)
    sctr1: Scattering "Scattering Boundary Condition 1" on boundaries 1-3, 5, 19, 20

Mesh
  mesh2 "Mesh 2"
    size: MeshSizeDefault | table = timeexplicitwave; hauto = 2
    size1: Size on domains 1-4 | table = timeexplicitwave; hauto = 3
    ftri1: FreeTri "Free Triangular 1" on remaining entities | smoothmaxiter = 4; smoothmaxdepth = 4
  mesh3 "Mesh 3"
    size: MeshSizeDefault | table = timeexplicitwave; hmax = 32; hmin = 0.064; hauto = 1
    size1: Size on domains 5 | table = timeexplicitwave; hmax = 32; hauto = 1
    size2: Size on domains 3, 4 | hmax = 64; hauto = 2
    size3: Size on domains 1, 2 | hmax = 118; hauto = 3
    ftri1: FreeTri "Free Triangular 1" on remaining entities | smoothmaxiter = 4; smoothmaxdepth = 4
  mesh4 "Layered"
    size: MeshSizeDefault | table = timeexplicitwave; hmax = 10; hmin = 0.084; hauto = 1; custom = on
    size1: Size "Core - Extremely fine" on domains 5 | table = timeexplicitwave; hmax = 21; hauto = 1; custom = on
    size2: Size "Outer clad - Extra fine" on domains 3, 4 | hmax = 42; hauto = 2; custom = on
    size3: Size "Boundary - Finer" on domains 1, 2 | hmax = 77.5; hauto = 3; custom = on
    ftri1: FreeTri "Free Triangular 1" on remaining entities | smoothmaxiter = 4; smoothmaxdepth = 4

Studies
  std1 "Sweep"
    param: Parametric "Parametric Sweep"
      sweeptype = filled
      pname = {wcor, wlp}
      plistarr = {range(600[nm],100[nm],800[nm]), range(1200[nm],20[nm],1800[nm])}
      punit = {nm, nm}
    mode: ModeAnalysis
      ftplistmethod = manual
      modeFreq = frp
      neigs = 3
      shift = ncor
      linpsolnum = auto
      mesh = {geom1, mesh4}

Solver configurations
  sol1 "Solution 1" (study std1)
    v1: Variables "Dependent Variables 1"
    e1: Eigenvalue "Eigenvalue Solver 1"
      d1: Direct "Suggested Direct Solver (ewfd)"
  sol2 "Parametric Solutions 1" (study std1)

Datasets
  dset1: Solution | solution = sol1
  dset2: Solution | solution = sol2

Derived values
  gev3: EvalGlobal "Disp v3"
    data = dset2
    table = tbl3
    expr = {frp, omp, real(ewfd.neff), (real(ewfd.neff)*omp)/c, -(wlp^2 / (2*pi)) * d((2*pi*real(ewfd.neff)/wlp), wlp), real(ewfd.neff) - wlp * d(real(ewfd.neff), wlp)}
    unit = {1/s, rad/s, , , , }
    descr = {frp, omp, rneff, beta, ng_beta, ng_rneff}

Tables
  tbl1: Table "wd600 Dp v3 com39 AlGaAs SiO2"
    // Disp v3
    wcor (nm) | wlp (nm) | Effective mode index (1) | frp (1/s) | omp (rad/s) | rneff (1) | beta (1/m) | ng_beta (1) | ng_rneff (1)
    600 | 1200 | 2.97155-1.17298e-16i | 2.49827e+14 | 1.56971e+15 | 2.97155 | 1.5559e+07 | 4.47623e-16 | 8.88178e-16
    600 | 1220 | 2.95719-5.90247e-16i | 2.45732e+14 | 1.54398e+15 | 2.95719 | 1.523e+07 | 0 | 0
    600 | 1240 | 2.94289-9.05507e-16i | 2.41768e+14 | 1.51907e+15 | 2.94289 | 1.49119e+07 | 0 | -4.44089e-16
    600 | 1260 | 2.92865+3.87542e-16i | 2.37931e+14 | 1.49496e+15 | 2.92865 | 1.46042e+07 | 1.48051e-15 | 1.33227e-15
    600 | 1280 | 2.91444-2.53142e-15i | 2.34213e+14 | 1.4716e+15 | 2.91444 | 1.43062e+07 | -5.09296e-16 | -4.44089e-16
    600 | 1300 | 2.90027-4.00999e-15i | 2.3061e+14 | 1.44896e+15 | 2.90027 | 1.40176e+07 | -5.25336e-16 | 0
    600 | 1320 | 2.88612-7.2232e-15i | 2.27115e+14 | 1.42701e+15 | 2.88612 | 1.37379e+07 | 5.41624e-16 | 4.44089e-16
    600 | 1340 | 2.87198-1.60217e-14i | 2.23726e+14 | 1.40571e+15 | 2.87198 | 1.34665e+07 | -5.58161e-16 | 0
    600 | 1360 | 2.85784-2.92691e-14i | 2.20436e+14 | 1.38504e+15 | 2.85784 | 1.32032e+07 | 5.74947e-16 | 8.88178e-16
    600 | 1380 | 2.8437-5.3577e-14i | 2.17241e+14 | 1.36496e+15 | 2.8437 | 1.29475e+07 | 1.18396e-15 | 4.44089e-16
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  tbl2: Table "wd700 Dp v3 com39 AlGaAs SiO2"
    // Disp v3
    wcor (nm) | wlp (nm) | Effective mode index (1) | frp (1/s) | omp (rad/s) | rneff (1) | beta (1/m) | ng_beta (1) | ng_rneff (1)
    700 | 1200 | 3.01124+7.55188e-16i | 2.49827e+14 | 1.56971e+15 | 3.01124 | 1.57668e+07 | 8.95247e-16 | 4.44089e-16
    700 | 1220 | 2.9983-5.02633e-16i | 2.45732e+14 | 1.54398e+15 | 2.9983 | 1.54417e+07 | 0 | 4.44089e-16
    700 | 1240 | 2.98545-2.70567e-16i | 2.41768e+14 | 1.51907e+15 | 2.98545 | 1.51275e+07 | 0 | 0
    700 | 1260 | 2.97267-8.70312e-16i | 2.37931e+14 | 1.49496e+15 | 2.97267 | 1.48237e+07 | 1.97402e-15 | 1.77636e-15
    700 | 1280 | 2.95997-1.85951e-15i | 2.34213e+14 | 1.4716e+15 | 2.95997 | 1.45297e+07 | 0 | -4.44089e-16
    700 | 1300 | 2.94732-4.08378e-15i | 2.3061e+14 | 1.44896e+15 | 2.94732 | 1.4245e+07 | 0 | 4.44089e-16
    700 | 1320 | 2.93472-7.53251e-15i | 2.27115e+14 | 1.42701e+15 | 2.93472 | 1.39692e+07 | 0 | 0
    700 | 1340 | 2.92216-1.50701e-14i | 2.23726e+14 | 1.40571e+15 | 2.92216 | 1.37018e+07 | -5.58161e-16 | -4.44089e-16
    700 | 1360 | 2.90963-2.67415e-14i | 2.20436e+14 | 1.38504e+15 | 2.90963 | 1.34425e+07 | 1.72484e-15 | 8.88178e-16
    700 | 1380 | 2.89713-4.83132e-14i | 2.17241e+14 | 1.36496e+15 | 2.89713 | 1.31907e+07 | 5.91982e-16 | 4.44089e-16
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  tbl3: Table "wd800 Dp v3 com39 AlGaAs SiO2"
    // Disp v3
    wcor (nm) | wlp (nm) | Effective mode index (1) | frp (1/s) | omp (rad/s) | rneff (1) | beta (1/m) | ng_beta (1) | ng_rneff (1)
    800 | 1200 | 3.03716-9.32748e-17i | 2.49827e+14 | 1.56971e+15 | 3.03716 | 1.59025e+07 | 1.34287e-15 | 8.88178e-16
    800 | 1220 | 3.02515-4.04537e-16i | 2.45732e+14 | 1.54398e+15 | 3.02515 | 1.558e+07 | 0 | 0
    800 | 1240 | 3.01324-7.63753e-16i | 2.41768e+14 | 1.51907e+15 | 3.01324 | 1.52683e+07 | 0 | 0
    800 | 1260 | 3.00143-1.87501e-15i | 2.37931e+14 | 1.49496e+15 | 3.00143 | 1.49671e+07 | 9.87009e-16 | 8.88178e-16
    800 | 1280 | 2.9897-3.25962e-15i | 2.34213e+14 | 1.4716e+15 | 2.9897 | 1.46757e+07 | -5.09296e-16 | -4.44089e-16
    800 | 1300 | 2.97805-5.74691e-15i | 2.3061e+14 | 1.44896e+15 | 2.97805 | 1.43936e+07 | 0 | 4.44089e-16
    800 | 1320 | 2.96647-1.13262e-14i | 2.27115e+14 | 1.42701e+15 | 2.96647 | 1.41204e+07 | 0 | 0
    800 | 1340 | 2.95494-2.0466e-14i | 2.23726e+14 | 1.40571e+15 | 2.95494 | 1.38556e+07 | 0 | 0
    800 | 1360 | 2.94347-3.55049e-14i | 2.20436e+14 | 1.38504e+15 | 2.94347 | 1.35988e+07 | 5.74947e-16 | 4.44089e-16
    800 | 1380 | 2.93203-6.32135e-14i | 2.17241e+14 | 1.36496e+15 | 2.93203 | 1.33496e+07 | 5.91982e-16 | 4.44089e-16
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
Plots
  pg1: PlotGroup2D "Electric Field (ewfd)" | data = dset2
    surf1: Surface | expr = ewfd.normE
    arws1: ArrowSurface | expr = {ewfd.Ex, ewfd.Ey}